F := 4.7  # Тяговая сила ленты [кН]
V := 0.60  # Скорость грузовой цепи [м/с]
t := 100  # Шаг грузовой цепи [мм]
z := 7  # Число зубьев звездочки
L_r := 7  # Срок службы привода [лет]
L_с := 1  # Сменность работы
t_c := 6  # Продолжительность смены [ч]
# Расчет параметров двигателя
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N_р.м. := F*V = 2.82  # Требуемая мощность рабочей машины
η_з.п. := (0.93 + 0.95)/2  # КПД закрытой передачи;
η_о.п. := (0.92 + 0.94)/2  # открытой передачи
η_м. := 0.98  # муфты
η_п.к. := (0.99 + 0.995)/2  # одной пары подшипников качения
η := η_з.п.*η_о.п.*η_м.*η_п.к.^3 = 0.837584  # Общий КПД привода
N_р.д. := N_р.м./η = 3.36683  # Расчетная мощность двигателя [кВт]
# Выбранный двигатель:
# ТИП : АИР112МВ6
P := 4  # Номинальная мощность [кВт]
n_ном := 950  # Номинальная частота вращения [об/мин]
η_д := 83.4  # КПД [%]
# Определение передаточного отношения привода
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n_р.о. := 60*1000*V/(z*t) = 51.4286  # Частота вращения приводного вала рабочей машины [об/мин]
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u := n_ном/n_р.о. = 18.4722  # Передаточное отношение привода
u_з.п. := 4.5  # Передаточное отношение закрытой передачи
u_о.п. := u/u_з.п. = 4.10494  # Передаточное отношение открытой передачи
# Кинематический расчет привода
# Определение силовых и кинематических параметров привода:
# (Б) - быстроходный вал двигателя
# (Т) - тихоходный вал двигателя
# (PO) - вал рабочего органа
# Мощность N, кВт
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# Двигателя
N_д := P = 4
Б
N_1 := N_д*η_м.*η_п.к. = 3.8906
Т
N_2 := N_1*η_з.п.*η_п.к. = 3.62974
РО
N_РО := N_2*η_о.п.*η_п.к. = 3.35034
# Частота вращения n, мин^-1
# Двигателя
n_ном = 950
Б
n_1 := n_ном = 950
Т
n_2 := n_1/u_з.п. = 211.111
РО
n_р.о. := n_2/u_о.п. = 51.4286
# Угловая скорость ω, c^-^1
# Двигателя
ω_ном := π*n_ном/30 = 99.4838
Б
ω_1 := ω_ном = 99.4838
Т
ω_2 := ω_1/u_з.п. = 22.1075
РО
ω_РО := ω_2/u_о.п. = 5.38559
# Вращающий момент T, Н*м
# Двигателя
T_д := N_д*10^3/ω_ном = 40.2076
Б
T_1 := T_д*η_м.*η_п.к. = 39.1079
Т
T_2 := T_1*u_з.п.*η_з.п.*η_п.к. = 164.186
РО
T_РО := T_2*u_о.п.*η_о.п.*η_п.к. = 622.093
# Проектирование зубчатой цилиндрической передачи
n_1 = 950
T_1 = 39.1079
n_2 = 211.111
T_2 = 164.186
# Для изготовления колеса и шестерни выбираем сравнительно недорогой материал – сталь 20Х
HRC_min := 56  # Твердость поверхности
HRC_max := 63
HRC_avr := (HRC_min + HRC_max)/2 = 59.5
σ_В := 650  # Предел прочности [МПа]
σ_Т := 400  # Предел текучести [МПа]
# Расчет напряжений
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# Твердость колеса должна быть меньше чем твердость шестерни
HRC_m1 := 60
HB_m1 := 650  # Для шестерни
HRC_m2 := 58
HB_m2 := 620  # Для колеса
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σ_Hlim1 := 23*HRC_max = 1449  # Предел контактной выносливости для шестерни [МПа]
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σ_Hlim2 := 1.8*HB_m2 + 65 = 1181  # Предел контактной выносливости для колеса [МПа]
# Расчет коэффициента долговечности
S_H := 1.2  # Коэффициент безопасности
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N_HG1 := 30*HB_m1^2.4 = 169088204  # Базовое число циклов шестерни
N_HG2 := 30*HB_m2^2.4 = 150959799  # Колеса
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K_D := 255  # Количество рабочих дней в году
L_r = 7  # Срок службы
L_с = 1  # Количество смен
t_р.п := L_r*K_D*L_с*8 = 14280  # Ресурс работы передачи в часах
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μ_H := 0.18  # Коэффициент режима работы
c := 1  # Кол. колес находящихся в зацеплении с данным
N_НЕ1 := μ_H*60*c*n_1*t_р.п = 146512800  # Эквивалентное число циклов шестерни
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N_НЕ2 := μ_H*60*c*n_2*t_р.п = 32558400  # Колеса
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Z_N1 := nthroot(N_HG1/N_НЕ1, 6) = 1.02417  # Коэффициент долговечности шестерни
Z_N2 := nthroot(N_HG2/N_НЕ2, 6) = 1.29132  # Колеса
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# Допускаемое контактное напряжение шестерни
σ_H1 := σ_Hlim1/S_H*Z_N1 = 1236.69
σ_H2 := σ_Hlim2/S_H*Z_N2 = 1270.87  # Колеса
σ_Hm := (σ_H1 + σ_H2)/2 = 1253.78  # Среднее допускаемое напряжение
σ_Hmin := σ_H1 = 1236.69  # Меньшее из σ_H1 и σ_H2
σ_Hп := 1.25*σ_Hmin = 1545.86  # Предельные контактные напряжения
σ_H := σ_Hm = 1253.78  # Окончательное (меньшее из σ_Hm и σ_Hп)
# Расчет допускаемого напряжения изгиба
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kof_тв := (57 + 73)/2*10^-2 = 0.65
HRC_с.ср1 := (HRC_m1 + HRC_m1*kof_тв)/2 = 49.5  # Средняя твердость сердцевины шестерни
HRC_с.ср2 := (HRC_m2 + HRC_m2*kof_тв)/2 = 47.85  # Средняя твердость сердцевины колеса
# Предел выносливости по напряжению изгиба
# шестерни | колеса
σ_Flim1 := 12*HRC_с.ср1 + 300 = 894
σ_Flim2 := 12*HRC_с.ср2 + 300 = 874.2
m_F := 9
N_FG := 4*10^6  # базовое число циклов для всех сталей
μ_F1 := 0.036  # коэффициент режима работы (напряжение изгиба)
# Эквивалентное число циклов
# шестерни | колеса
N_FE1 := μ_F1*60*c*n_1*t = 205200
N_FE2 := μ_F1*60*c*n_2*t = 45600
# Коэффициент долговечности
# шестерни
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# колеса
Y_N1 := nthroot(N_FG/N_FE1, m_F) = 1.39098
Y_N2 := nthroot(N_FG/N_FE2, m_F) = 1.64399
S_F := 1.55  # Коэффициент безопасности
Y_A := 1  # Коэффициент влияния 2-сторонней нагрузки
# Допускаемое напряжение изгиба [МПа]
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# шестерни | колеса
σ_F1 := σ_Flim1/S_F*Y_A*Y_N1 = 802.28
σ_F2 := σ_Flim2/S_F*Y_A*Y_N2 = 927.211
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# Максимальные допускаемые контактные напряжения [МПа]
# шестерни | колеса
σ_Hmax1 := 44*HRC_m1 = 2640
σ_Hmax2 := 44*HRC_m2 = 2552
# Максимальные допускаемые напряжения изгиба
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Y_Nmax := 2.5  # коэффициент долговечности
K_st := 1.2  # коэффициент учета частоты приложения пиковой нагрузки
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σ_Fmax1 := 0.5*σ_Flim1*Y_Nmax*K_st = 1341  # шестерни
σ_Fmax2 := 0.5*σ_Flim2*Y_Nmax*K_st = 1311.3  # колеса
# Проектный расчет цилиндрической прямозубой передачи
K_d := 780  # Вспомогательный коэффициент для прямозубых колес
u_о.п. = 4.10494
# Передаточное число передачи (u=i)
i := u_о.п. = 4.10494  # Заданное передаточное отношение
Ψ_ba := (0.15 + 0.2)/2 = 0.175  # Коэффициент ширины колеса относительно межосевого расстояния
Ψ_bdmax := (0.45 + 0.55)/2 = 0.5
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Ψ_bd := 0.5*Ψ_ba*(u_о.п. + 1) = 0.446682  # Коэффициент ширины колеса относительно делительного диаметра
T_1 = 39.1079  # Момент на быстроходном валу передачи (шестерня) [Нм]
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K_Hβ := 1.04  # Коэффициент концентрации нагрузки
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K_Ha := 1 + C*(n_ст - 5)  # error: Эта переменная не определена. Проверьте правильность установки обозначения.
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# Знак + для внешнего зацепления колес
d_1 := K_d*nthroot(T_1*K_Hβ/(σ_H^2*Ψ_bd)*((u + 1)/u), 3) = 30.7147  # Делительный диаметр
b_w := d_1*Ψ_bd = 13.7197  # Ширена зубчатых колес [мм]
b_w2 := 15  # Ширена колеса [мм]
b_w1 := 20  # Ширена шестерни (добавил 5 мм) [мм]
Ψ_m := (20 + 15)/2 = 17.5  # Коэффициент модуля
m_n := b_w/Ψ_m = 0.783982  # Модуль передачи [мм]
m_n := 1  # Принимаем стандартный модуль
ε_β := 1.1  # Коэффициент осевого перекрытия
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β' := 0  # Угол наклона зубьев [рад]
# равным 0 для прямозубой передачи
β'° := β'*180/π = 0  # [градусов]
z' := d_1*cos(β')/m_n = 30.7147
z_1 := 31  # Количество зубьев шестерни
z_2 := z_1*u_о.п. = 127.253
z_2 := 128  # Колеса
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x_1 := 0  # Коэффициенты смещения шестерни
x_2 := x_1 = 0
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a'_w := m_n*(z_2 + z_1)/(2*cos(β')) = 79.5  # Предварительная оценка межосевого расстояния [мм]
a_w := 85  # Стандартное межосевое расстояние (табл 2.2)
β := acos(m_n*(z_2 + z_1)/(2*a_w)) = 0.361707
u_о.п.р. := z_2/z_1 = 4.12903
d_1 := m_n*z_1/cos(β) = 33.1447  # Делительный диаметр шестерни
d_2 := m_n*z_2/cos(β) = 136.855  # Делительный диаметр колеса
# Проверочные расчеты цилиндрической прямозубой передачи
ε_a := (0.95 - 1.6*(1/z_1 + 1/z_2))*(1 + cos(β))*cos(β) = 1.60352
ε_β := b_w*sin(β)/(π*m_n) = 1.5454
Z_Hβ := sqrt(cos(β)^2/ε_a) = 0.738604
C := 0.06
n_cm := (5 + 9)/2 = 7
K_Ha := 1 + C*(n_cm - 5) = 1.12
v := π*d_1*10^-3*n_1/60 = 1.64868
K_Hv := 1
K_H := K_Ha*K_Hβ*K_Hv = 1.1648
E_пр := 2.1*10^5
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σ_H = 1253.78
b_w = 13.7197  # Ширена зубчатых колес [мм]
b_w := 16
b_w2 = 15
b_w2 := 17  # Ширена колеса [мм]
b_w1 = 20
b_w1 := 22  # Ширена шестерни (добавил 5 мм) [мм]
σ_H.пр := 1.18*Z_Hβ + sqrt(E_пр*T_1*10^3*K_H/(d_1^2*b_w*sin(2*a_w°))*((u + 1)/u)) = 1818.51
# Изменяем ширину шестеренок чтобы процент перегрузки был <5
Δ_σH := (σ_H.пр - σ_H)/σ_H*100 = 45.0421
F_t := 2*T_1/(d_1*10^-3) = 2359.83
a_w = 85
x_1 = 0
F_r := F_t*tan(a_w°)/cos(β) = 28839
x_2 = 0
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F_a := F_t*tan(β) = 892.849
z_v1 := z_1/cos(β)^3 = 37.8893
z_v2 := z_2/cos(β)^3 = 156.446
# шестерня | колесо
Y_FS1 := 3.6
Y_FS2 := 3.65
σ_F1/Y_FS1 = 222.856
σ_F2/Y_FS2 = 254.03
# Дальнейший расчет ведем по шестерне тк это соотношение меньше
σ_F := σ_F1 = 802.28
Y_FS := Y_FS1 = 3.6
Y_β := 1 - β°/100 = 0.999937
Y_Fβ := Y_β/ε_a = 0.62359
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K_Fa := K_Ha = 1.12
K_Fβ := 1.04
Ψ_bd = 0.446682
K_Fv := 1
K_F := K_Fa*K_Fβ*K_Fv = 1.1648
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σ_F.пр := F_t*K_F*Y_FS*Y_Fβ/(b_w*m_n) = 385.668
Δ_σF := (σ_F.пр - σ_F)/σ_F = -0.519285
# У Лустенкова кратность перегрузки есть в исходных данных у меня ее нет
K_П := 2
σ_Hmax1 = 2640
σ_Hmax2 = 2552
# Отличия вроде не большие так что параметры оставляю эти
σ_Hmax := σ_H.пр*sqrt(K_П) = 2571.76
σ_Fmax1 = 1341
σ_Fmax2 = 1311.3
σ_Fmax := σ_F.пр*K_П = 771.336
# Расчет геометрии передачи и оформление результатов расчета
h_za := 1  # Коэффициент высоты головки зуба
c_z := 0.25  # Коэффициент радиального зазора
# Коэффициент уравнительного смещения (ГОСТ 16532-70)
a := 0.5*(z_1 + z_2) = 79.5  # Угол профиля
a_w = 85  # Межосевое расстояние
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Δy := 0
m_n = 1  # Модуль
# Диаметры вершин зубьев [мм]
# шестерни | колеса
d_a1 := d_1 + 2*m_n*(h_za + x_1 - Δy) = 35.1447
d_a2 := d_2 + 2*m_n*(h_za + x_2 - Δy) = 138.855
# Диаметры впадин зубьев [мм]
# шестерни | колеса
d_f1 := d_1 - 2*m_n*(h_za + c_z - x_1) = 30.6447
d_f2 := d_2 - 2*m_n*(h_za + c_z - x_2) = 134.355
